*Heading
** Job name: Waterbomb_pattern Model name: fv_newpattern2
** Generated by: Abaqus/CAE 6.14-4
*Preprint, echo=NO, model=NO, history=NO, contact=NO
**
** PARTS
**
*Part, name=Part-3
*Node
      1,   154.861618,   245.138382,           0.
      2,   155.568726,    245.84549,           0.
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*Element, type=S4R
1,   1,   2, 353, 356
2, 356, 353, 354, 355
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*Element, type=S3
14917, 17782, 17400, 17379
14918, 17803, 17584, 17300
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*Nset, nset=Set-1
     2,     3,     5,     8,     9,    10
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*Elset, elset=Set-1
    47,    48,    49,    50,    51,    52
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*Nset, nset=Set-2
    1,    2,    3,    4,    5,    6
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*Elset, elset=Set-2
     1,     2,     3,     4,     5,     6
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*Nset, nset=Set-3
     2,     3,     9,    10,    11,    21
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*Elset, elset=Set-3
    47,    48,    49,    50,    51,    52
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*Nset, nset=Set-4
     5,     8,    14,    15,    16,    19
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*Elset, elset=Set-4
  2547,  2548,  2549,  2550,  2551,  2552
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*Nset, nset=Set-5
     2,     3,     5,     8,    21,    22
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*Elset, elset=Set-5
  2547,  2548,  2549,  2550,  2551,  2552
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*Nset, nset=Set-6
     9,    10,    11,    14,    15,    16
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*Elset, elset=Set-6
    47,    48,    49,    50,    51,    52
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*Nset, nset=Set-7
     5,     8,    14,    15,    16,    19
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*Elset, elset=Set-7
  2547,  2548,  2549,  2550,  2551,  2552
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*Nset, nset=Set-8
     2,     3,     9,    10,    11,    21
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*Elset, elset=Set-8
    47,    48,    49,    50,    51,    52
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** Section: Section-2
*Shell Section, elset=Set-2, material=PLA
0.5, 5
** Section: Section-1
*Shell Section, elset=Set-8, composite
1., 3, PLA, 0., P1
1., 3, PLA, 90., P2
** Section: Section-1
*Shell Section, elset=Set-7, composite
1., 3, PLA, 0., P1
1., 3, PLA, 90., P2
*End Part
**
**
** ASSEMBLY
**
*Assembly, name=Assembly
**
*Instance, name=Part-3-1, part=Part-3
*End Instance
**
*Nset, nset=Set-84, instance=Part-3-1
   172,   175,   179,   180,   210,   257
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*Elset, elset=Set-84, instance=Part-3-1
 12439, 12440, 12441, 12442, 12443, 12444
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*Nset, nset=Set-85, instance=Part-3-1
 180, 288, 300, 347
*Nset, nset=Set-86, instance=Part-3-1
 295, 297, 306, 309
*Nset, nset=Set-87, instance=Part-3-1
 294, 295, 297, 304, 306, 309, 310, 326
*Elset, elset=Set-87, instance=Part-3-1
 12443, 12445, 12450, 12452, 12454, 12456, 14908, 14913
*Nset, nset=Set-88, instance=Part-3-1
  26,  85, 213, 300
*Nset, nset=Set-89, instance=Part-3-1, generate
     1,  24937,      1
*Elset, elset=Set-89, instance=Part-3-1, generate
     1,  23580,      1
*Elset, elset=_Surf-2_E3, internal, instance=Part-3-1
 12443, 12445, 12450, 12452, 12454, 12456, 14908, 14913
*Surface, type=ELEMENT, name=Surf-2
_Surf-2_E3, E3
*Elset, elset=_Surf-3_SPOS, internal, instance=Part-3-1
 12457, 12458, 12459, 12460, 12461, 12462
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*Surface, type=ELEMENT, name=Surf-3
_Surf-3_SPOS, SPOS
*End Assembly
*Amplitude, name=Amp-1, definition=SMOOTH STEP
             0.,             25.,             0.5,             65.
*Amplitude, name=Amp-2, definition=SMOOTH STEP
             0.,              0.,             0.5,              1.
*Amplitude, name=Amp-3
             0.,             25.,             0.5,             65.
*Amplitude, name=Amp-4
             0.,              0.,            0.25,              1.,             0.5,              0.
*Amplitude, name=Amp-5
             0.,              1.,             0.2,              0.,             0.5,              0.
*Amplitude, name=Amp-6
             0.,              0.,             0.5,              1.
**
** MATERIALS
**
*Material, name=PLA
*Density
 1.25e-09,
*Elastic, type=LAMINA
 8.26, 6.608,  0.45,  0.79,  0.79,  0.79
*Expansion, type=ORTHO
 -0.00144675, 0.00017025,         0.
**
** INTERACTION PROPERTIES
**
*Surface Interaction, name=IntProp-1
*Friction
0.,
*Surface Behavior, pressure-overclosure=HARD
**
** PREDEFINED FIELDS
**
** Name: Predefined Field-7   Type: Temperature
*Initial Conditions, type=TEMPERATURE
Set-89, 25.
** ----------------------------------------------------------------
**
** STEP: Step-3
**
*Step, name=Step-3, nlgeom=YES
*Dynamic, Explicit
, 0.5
*Bulk Viscosity
0.06, 1.2
**
** BOUNDARY CONDITIONS
**
** Name: BC-11 Type: Displacement/Rotation
*Boundary
Set-88, 3, 3
**
** PREDEFINED FIELDS
**
** Name: Predefined Field-7   Type: Temperature
*Temperature, amplitude=Amp-1
Set-89, 1.
**
** OUTPUT REQUESTS
**
*Restart, write, number interval=1, time marks=NO
**
** FIELD OUTPUT: F-Output-1
**
*Output, field, number interval=100
*Node Output
A, AR, AT, U, UR, UT, V, VR
VT
*Element Output, directions=YES
CTSHR, E, EDCDEN, EDT, EFABRIC, ELEDEN, ELEN, ENER, ER, ERV, LE, MISES, MISESMAX, MISESONLY, NE, PE
PEEQ, PEEQMAX, PEEQT, PEEQVAVG, PEMAG, PEQC, PEVAVG, PRESSONLY, PS, S, SE, SFABRIC, SSAVG, SVAVG, TRIAX, TSHR
VE, VEEQ, VS
**
** HISTORY OUTPUT: H-Output-1
**
*Output, history
*Energy Output
ALLAE, ALLCD, ALLCW, ALLDC, ALLDMD, ALLFD, ALLIE, ALLKE, ALLMW, ALLPD, ALLPW, ALLSE, ALLVD, ALLWK, ETOTAL
*End Step
