*Heading
** Job name: Wrapping_pattern Model name: fv_newpattern111
** Generated by: Abaqus/CAE 6.14-4
*Preprint, echo=NO, model=NO, history=NO, contact=NO
**
** PARTS
**
*Part, name=wrapping
*Node
      1,   68.2885056,          25.,           0.
      2,   67.3206482,         27.5,           0.
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*Element, type=S4R
 1,    1,  157, 1975,  170
 2,  157,  158, 1976, 1975
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*Element, type=S3
369, 2159, 2148, 2128
370, 2154, 2167, 2133
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*Nset, nset=Set-1
     5,     8,    12,    15,    19,    22
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*Elset, elset=Set-1
   369,   370,   371,   372,   373,   374
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*Nset, nset=Set-10
    1,    2,    3,    4,    5,    6
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*Elset, elset=Set-10
     1,     2,     3,     4,     5,     6
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** Section: Section-2
*Shell Section, elset=Set-10, material=PLA
0.4, 5
** Section: Section-1-Copy2
*Shell Section, elset=Set-1, composite
0.4, 3, PLA, 0., P1
0.4, 3, PLA, 90., P2
0.4, 3, PLA, 0., P3
0.4, 3, PLA, 90., P4
0.4, 3, PLA, 0., P5
** Region: (CompositeLayup-1-Copy-Copy-Copy-1: Generated From Layup)
*Elset, elset=CompositeLayup-1-Copy-Copy-Copy-1
  1424,  1425,  1426,  1427,  1428,  1429
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** Section: CompositeLayup-1-Copy-Copy-Copy-1
*Shell Section, elset=CompositeLayup-1-Copy-Copy-Copy-1, composite, layup=CompositeLayup-1-Copy-Copy-Copy
2., 3, PLA, -22.5, Ply-1
2., 3, PLA, 67.5, Ply-2
** Region: (CompositeLayup-1-1: Generated From Layup)
*Elset, elset=CompositeLayup-1-1
  3145,  3146,  3147,  3148,  3149,  3150
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** Section: CompositeLayup-1-1
*Shell Section, elset=CompositeLayup-1-1, composite, layup=CompositeLayup-1
2., 3, PLA, 23.83, Ply-1
2., 3, PLA, 113.83, Ply-2
** Region: (CompositeLayup-1-Copy-1: Generated From Layup)
*Elset, elset=CompositeLayup-1-Copy-1
  4916,  4917,  4918,  4919,  4920,  4921
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** Section: CompositeLayup-1-Copy-1
*Shell Section, elset=CompositeLayup-1-Copy-1, composite, layup=CompositeLayup-1-Copy
2., 3, PLA, 113.83, Ply-1
2., 3, PLA, 23.83, Ply-2
** Region: (CompositeLayup-1-Copy-Copy-1: Generated From Layup)
*Elset, elset=CompositeLayup-1-Copy-Copy-1, generate
  6655,  10109,      1
** Section: CompositeLayup-1-Copy-Copy-1
*Shell Section, elset=CompositeLayup-1-Copy-Copy-1, composite, layup=CompositeLayup-1-Copy-Copy
2., 3, PLA, 67.5, Ply-1
2., 3, PLA, -22.5, Ply-2
*End Part
**
**
** ASSEMBLY
**
*Assembly, name=Assembly
**
*Instance, name=wrapping-1, part=wrapping
*End Instance
**
*Nset, nset=Set-117, instance=wrapping-1, generate
     1,  16876,      1
*Elset, elset=Set-117, instance=wrapping-1, generate
     1,  16360,      1
*Nset, nset=Set-118, instance=wrapping-1
     5,     8,    12,    15,    19,    22
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*Elset, elset=Set-118, instance=wrapping-1
   369,   370,   371,   372,   373,   374
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*End Assembly
*Amplitude, name=Amp-1, definition=SMOOTH STEP
             0.,             25.,              1.,             85.
*Amplitude, name=Amp-2, definition=SMOOTH STEP
             0.,              0.,             0.5,              1.
*Amplitude, name=Amp-3
             0.,             25.,             0.5,             65.
*Amplitude, name=Amp-4
             0.,              0.,            0.25,              1.,             0.5,              0.
*Amplitude, name=Amp-5
             0.,              1.,             0.2,              0.,             0.5,              0.
*Amplitude, name=Amp-6
             0.,              0.,             0.5,              1.
**
** MATERIALS
**
*Material, name=PLA
*Density
 1.25e-09,
*Elastic, type=LAMINA
 4.87,  3.9, 0.45, 0.67, 0.67, 0.67
*Expansion, type=ORTHO
 0.0004995, -0.00242317,          0.
**
** INTERACTION PROPERTIES
**
*Surface Interaction, name=IntProp-1
*Friction
0.,
*Surface Behavior, pressure-overclosure=HARD
**
** BOUNDARY CONDITIONS
**
** Name: BC-14 Type: Symmetry/Antisymmetry/Encastre
*Boundary
Set-118, ENCASTRE
**
** PREDEFINED FIELDS
**
** Name: Predefined Field-7   Type: Temperature
*Initial Conditions, type=TEMPERATURE
Set-117, 25.
**
** INTERACTIONS
**
** Interaction: Int-1
*Contact, op=NEW
*Contact Inclusions, ALL EXTERIOR
*Contact Property Assignment
 ,  , IntProp-1
** ----------------------------------------------------------------
**
** STEP: Step-3
**
*Step, name=Step-3, nlgeom=YES
*Dynamic, Explicit
, 1.
*Bulk Viscosity
0.06, 1.2
**
** PREDEFINED FIELDS
**
** Name: Predefined Field-7   Type: Temperature
*Temperature, amplitude=Amp-1
Set-117, 1.
**
** OUTPUT REQUESTS
**
*Restart, write, number interval=1, time marks=NO
**
** FIELD OUTPUT: F-Output-1
**
*Output, field, number interval=100
*Node Output
A, AR, AT, U, UR, UT, V, VR
VT
*Element Output, directions=YES
CTSHR, E, EDCDEN, EDT, EFABRIC, ELEDEN, ELEN, ENER, ER, ERV, LE, MISES, MISESMAX, MISESONLY, NE, PE
PEEQ, PEEQMAX, PEEQT, PEEQVAVG, PEMAG, PEQC, PEVAVG, PRESSONLY, PS, S, SE, SFABRIC, SSAVG, SVAVG, TRIAX, TSHR
VE, VEEQ, VS
**
** HISTORY OUTPUT: H-Output-1
**
*Output, history
*Energy Output
ALLAE, ALLCD, ALLCW, ALLDC, ALLDMD, ALLFD, ALLIE, ALLKE, ALLMW, ALLPD, ALLPW, ALLSE, ALLVD, ALLWK, ETOTAL
*End Step
