*Heading
** Job name: WW_edgeshape_L24_t03 Model name: fv_edge_connect-modified-24
** Generated by: Abaqus/CAE 6.14-4
*Preprint, echo=NO, model=NO, history=NO, contact=NO
**
** PARTS
**
*Part, name=fv_edge
*Node
      1,  -4.56568527,          -4.,           0.
      2,          -4.,  -4.56568527,           0.
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*Element, type=S4R
1,   1, 775, 776,   4
2, 775,   2,   3, 776
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*Element, type=S3
10573, 12174, 12173, 12129
10574, 12123, 12111, 12175
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*Nset, nset=Set-1
     1,     2,     3,     4,     5,     6
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*Elset, elset=Set-1
     1,     2,     3,     4,     5,     6
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*Nset, nset=Set-2
     1,     2,     3,     4,     5,     6
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*Elset, elset=Set-2
   347,   348,   349,   350,   351,   352
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*Nset, nset=Set-3
     1,     2,     3,     4,     5,     6
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*Elset, elset=Set-3
   347,   348,   349,   350,   351,   352
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*Nset, nset=Set-4
    1,    2,    3,    4,    5,    6
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*Elset, elset=Set-4
     1,     2,     3,     4,     5,     6
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** Section: Section-2
*Shell Section, elset=Set-4, material=PLA
0.3, 5
** Section: Section-1
*Shell Section, elset=Set-3, composite
1., 3, PLA, 0., P1
1., 3, PLA, 90., P2
*End Part
**
**
** ASSEMBLY
**
*Assembly, name=Assembly
**
*Instance, name=fv_edge-1, part=fv_edge
*End Instance
**
*Nset, nset=Set-80, instance=fv_edge-1
 766,
*Nset, nset=Set-81, instance=fv_edge-1
 750,
*Nset, nset=Set-82, instance=fv_edge-1
 744,
*Nset, nset=Set-83, instance=fv_edge-1
 739,
*Nset, nset=Set-84, instance=fv_edge-1
  305,  474,  476,  477,  478,  480
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*Elset, elset=Set-84, instance=fv_edge-1
   411,   424,   437,   450,   463,   476
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*Nset, nset=Set-85, instance=fv_edge-1
     1,     2,     3,     4,     5,     6
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*Elset, elset=Set-85, instance=fv_edge-1, generate
     1,  13157,      1
*Nset, nset=Set-86, instance=fv_edge-1, generate
     1,  14126,      1
*Elset, elset=Set-86, instance=fv_edge-1, generate
     1,  13157,      1
*Nset, nset=Set-87, instance=fv_edge-1
     1,     2,     3,     4,     5,     6
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*Elset, elset=Set-87, instance=fv_edge-1
   347,   348,   349,   350,   351,   352
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*End Assembly
*Amplitude, name=Amp-1, definition=SMOOTH STEP
             0.,             25.,             0.1,             55.
*Amplitude, name=Amp-2, definition=SMOOTH STEP
             0.,              0.,             0.5,              1.
*Amplitude, name=Amp-3
             0.,             25.,             0.5,             65.
*Amplitude, name=Amp-4
             0.,              0.,            0.25,              1.,             0.5,              0.
**
** MATERIALS
**
*Material, name=PLA
*Density
 1.25e-09,
*Elastic, type=LAMINA
 8.26, 6.608,  0.45,  0.79,  0.79,  0.79
*Expansion, type=ORTHO
 -0.00144675, 0.00017025,         0.
**
** INTERACTION PROPERTIES
**
*Surface Interaction, name=IntProp-1
1.,
*Friction
0.,
*Surface Behavior, pressure-overclosure=HARD
**
** BOUNDARY CONDITIONS
**
** Name: BC-5 Type: Displacement/Rotation
*Boundary
Set-80, 1, 1
Set-80, 2, 2
Set-80, 3, 3
** Name: BC-6 Type: Displacement/Rotation
*Boundary
Set-81, 2, 2
Set-81, 3, 3
** Name: BC-7 Type: Displacement/Rotation
*Boundary
Set-82, 1, 1
Set-82, 3, 3
** Name: BC-8 Type: Displacement/Rotation
*Boundary
Set-83, 3, 3
**
** PREDEFINED FIELDS
**
** Name: Predefined Field-7   Type: Temperature
*Initial Conditions, type=TEMPERATURE
Set-87, 25.
** ----------------------------------------------------------------
**
** STEP: Step-1
**
*Step, name=Step-1, nlgeom=YES, inc=1000
*Static
0.5, 0.5, 5e-06, 0.5
**
** PREDEFINED FIELDS
**
** Name: Predefined Field-7   Type: Temperature
*Temperature, amplitude=Amp-3
Set-87, 1.
**
** OUTPUT REQUESTS
**
*Restart, write, frequency=0
**
** FIELD OUTPUT: F-Output-1
**
*Output, field, variable=PRESELECT, number interval=100
**
** HISTORY OUTPUT: H-Output-1
**
*Output, history, variable=PRESELECT, number interval=100
*End Step
