*Heading
** Job name: Unit_70_bistable-17-3 Model name: Unit_70-bistable
** Generated by: Abaqus/CAE 6.14-4
*Preprint, echo=NO, model=NO, history=NO, contact=NO
**
** PARTS
**
*Part, name=Part-10
*Node
      1,           0.,  0.697379708,           0.
      2,  0.488309503,           0.,           0.
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*Element, type=S4R
 1,    1,   38,  972,   59
 2,   38,   39,  973,  972
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*Element, type=S3
238, 1471, 1231, 1530
239, 1447, 1804, 1268
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*Nset, nset=Set-1
    1,    2,    3,    4,    5,    6
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*Elset, elset=Set-1
  238,  239,  240,  241,  242,  243
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*Nset, nset=Set-2
    1,    2,    3,    4,    5,    6
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*Elset, elset=Set-2
    1,    2,    3,    4,    5,    6
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** Section: Section-2
*Shell Section, elset=Set-2, material=PLA
0.4, 5
** Section: Section-1
*Shell Section, elset=Set-1, composite
1.7, 3, PLA, 0., P1
0.3, 3, PLA, 90., P2
*End Part
**
*Part, name=harrmer-3
*Node
      1,          0.5,           0.,           0.
      2,          0.5,          2.5,           0.
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*Element, type=R3D4
  1,   1,  33,  95,  34
  2,  33,  32,  96,  95
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*Element, type=R3D3
776, 895, 894, 914
777, 827, 825, 824
778, 840, 855, 841
779, 892, 904, 893
780, 958, 968, 926
*Node
    973,  -1.86820528e-15,         -0.5,           0.
*Nset, nset=harrmer-3-RefPt_, internal
973,
*Nset, nset=Set-1
 973,
*Elset, elset=harrmer-3, generate
   1,  958,    1
*Element, type=MASS, elset=Set-1_Inertia-1_MASS_
959, 973
*Mass, elset=Set-1_Inertia-1_MASS_
1e-11,
*Element, type=ROTARYI, elset=Set-1_Inertia-1_ROTI_
960, 973
*Rotary Inertia, elset=Set-1_Inertia-1_ROTI_
1e-11, 1e-11, 1e-11, 0., 0., 0.
*End Part
**
**
** ASSEMBLY
**
*Assembly, name=Assembly
**
*Instance, name=Part-10-3, part=Part-10
*End Instance
**
*Instance, name=harrmer-3-1, part=harrmer-3
 6.12323399573677e-17,           0.,         -0.5
 6.12323399573677e-17,           0.,         -0.5,  1.04530145555251e-16, 0.707106811231781, -1.20710681123178,         180.
*End Instance
**
*Nset, nset=Set-91, instance=harrmer-3-1
 973,
*Nset, nset=Set-92, instance=Part-10-3, generate
    1,  7351,     1
*Elset, elset=Set-92, instance=Part-10-3, generate
    1,  7111,     1
*Nset, nset=Set-93, instance=Part-10-3
 34,
*Nset, nset=Set-94, instance=Part-10-3
 28,
*Nset, nset=Set-95, instance=Part-10-3
 37,
*Nset, nset=Set-96, instance=Part-10-3
 31,
*Nset, nset=load, instance=harrmer-3-1
 973,
*Nset, nset=m_Set-90, instance=harrmer-3-1
 973,
*Nset, nset=panel, instance=Part-10-3
    1,    2,    3,    4,    5,    6
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*Elset, elset=panel, instance=Part-10-3
  238,  239,  240,  241,  242,  243
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*Elset, elset=_Surf-8_SPOS, internal, instance=Part-10-3
  238,  239,  240,  241,  242,  243
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*Surface, type=ELEMENT, name=Surf-8
_Surf-8_SPOS, SPOS
*Elset, elset=_s_Surf-7_SPOS, internal, instance=Part-10-3
  193,  194,  195,  196,  197,  198
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*Surface, type=ELEMENT, name=s_Surf-7
_s_Surf-7_SPOS, SPOS
*Rigid Body, ref node=harrmer-3-1.harrmer-3-RefPt_, elset=harrmer-3-1.harrmer-3
** Constraint: Constraint-9
*Coupling, constraint name=Constraint-9, ref node=m_Set-90, surface=s_Surf-7
*Kinematic
3, 3
*End Assembly
*Amplitude, name=Amp-1, definition=SMOOTH STEP
             0.,             25.,             0.1,             55.
*Amplitude, name=Amp-2, definition=SMOOTH STEP
             0.,              0.,             0.5,              1.
*Amplitude, name=Amp-3
             0.,             25.,             0.5,             65.
*Amplitude, name=Amp-4
             0.,              0.,             0.1,              1.,             0.3,              0.
*Amplitude, name=Amp-5, definition=SMOOTH STEP
             0.,              0.,             0.5,              1.
**
** MATERIALS
**
*Material, name=PLA
*Density
 1.25e-09,
*Elastic, type=LAMINA
 8.26, 6.608,  0.45,  0.79,  0.79,  0.79
*Expansion, type=ORTHO
 -0.00144675, 0.00017025,         0.
**
** INTERACTION PROPERTIES
**
*Surface Interaction, name=IntProp-1
*Friction
 0.3,
*Surface Behavior, pressure-overclosure=HARD
**
** BOUNDARY CONDITIONS
**
** Name: BC-10 Type: Displacement/Rotation
*Boundary
Set-91, 4, 4
Set-91, 5, 5
Set-91, 6, 6
** Name: BC-11 Type: Displacement/Rotation
*Boundary
Set-93, 1, 1
Set-93, 2, 2
Set-93, 3, 3
** Name: BC-13 Type: Displacement/Rotation
*Boundary
Set-94, 1, 1
Set-94, 3, 3
** Name: BC-14 Type: Displacement/Rotation
*Boundary
Set-95, 2, 2
Set-95, 3, 3
** Name: BC-15 Type: Displacement/Rotation
*Boundary
Set-96, 3, 3
**
** PREDEFINED FIELDS
**
** Name: Predefined Field-7   Type: Temperature
*Initial Conditions, type=TEMPERATURE
Set-92, 25.
**
** INTERACTIONS
**
** Interaction: Int-3
*Contact, op=NEW
*Contact Inclusions, ALL EXTERIOR
*Contact Property Assignment
 ,  , IntProp-1
** ----------------------------------------------------------------
**
** STEP: Step-3
**
*Step, name=Step-3, nlgeom=YES
*Dynamic, Explicit
, 0.5
*Bulk Viscosity
0.06, 1.2
**
** BOUNDARY CONDITIONS
**
** Name: BC-10 Type: Displacement/Rotation
*Boundary, op=NEW
Set-91, 4, 4
Set-91, 5, 5
Set-91, 6, 6
** Name: BC-11 Type: Displacement/Rotation
*Boundary, op=NEW
Set-93, 1, 1
Set-93, 2, 2
Set-93, 3, 3
** Name: BC-13 Type: Displacement/Rotation
*Boundary, op=NEW
Set-94, 1, 1
Set-94, 3, 3
** Name: BC-14 Type: Displacement/Rotation
*Boundary, op=NEW
Set-95, 2, 2
Set-95, 3, 3
** Name: BC-15 Type: Displacement/Rotation
*Boundary, op=NEW
Set-96, 3, 3
**
** PREDEFINED FIELDS
**
** Name: Predefined Field-7   Type: Temperature
*Temperature, amplitude=Amp-3
Set-92, 1.
**
** OUTPUT REQUESTS
**
*Restart, write, number interval=1, time marks=NO
**
** FIELD OUTPUT: F-Output-2
**
*Output, field, number interval=100
*Node Output
A, AR, AT, U, UR, UT, V, VR
VT
*Element Output, directions=YES
CTSHR, E, EFABRIC, ER, ERV, LE, MISES, MISESMAX, MISESONLY, NE, PE, PEEQ, PEEQMAX, PEEQT, PEEQVAVG, PEMAG
PEQC, PEVAVG, PRESSONLY, PS, S, SE, SFABRIC, SSAVG, SVAVG, TRIAX, TSHR, VE, VEEQ, VS
**
** HISTORY OUTPUT: H-Output-4
**
*Output, history, time interval=0.00025
*Energy Output
ALLAE, ALLCD, ALLCW, ALLDC, ALLDMD, ALLFD, ALLIE, ALLKE, ALLMW, ALLPD, ALLPW, ALLSE, ALLVD, ALLWK, ETOTAL
**
** HISTORY OUTPUT: H-Output-5
**
*Energy Output, elset=panel
ALLIE, ALLSE
*End Step
** ----------------------------------------------------------------
**
** STEP: Step-4
**
*Step, name=Step-4, nlgeom=YES
*Dynamic, Explicit
, 0.5
*Bulk Viscosity
0.06, 1.2
**
** BOUNDARY CONDITIONS
**
** Name: BC-10 Type: Displacement/Rotation
*Boundary, amplitude=Amp-5
Set-91, 3, 3, 2.
Set-91, 4, 4
Set-91, 5, 5
Set-91, 6, 6
**
** OUTPUT REQUESTS
**
*Restart, write, number interval=1, time marks=NO
**
** FIELD OUTPUT: F-Output-2
**
*Output, field, number interval=100
*Node Output
A, AR, AT, U, UR, UT, V, VR
VT
*Element Output, directions=YES
CTSHR, E, EFABRIC, ER, ERV, LE, MISES, MISESMAX, MISESONLY, NE, PE, PEEQ, PEEQMAX, PEEQT, PEEQVAVG, PEMAG
PEQC, PEVAVG, PRESSONLY, PS, S, SE, SFABRIC, SSAVG, SVAVG, TRIAX, TSHR, VE, VEEQ, VS
**
** HISTORY OUTPUT: H-Output-4
**
*Output, history, time interval=0.00025
*Energy Output
ALLAE, ALLCD, ALLCW, ALLDC, ALLDMD, ALLFD, ALLIE, ALLKE, ALLMW, ALLPD, ALLPW, ALLSE, ALLVD, ALLWK, ETOTAL
**
** HISTORY OUTPUT: H-Output-3
**
*Node Output, nset=load
RF3, U3
**
** HISTORY OUTPUT: H-Output-5
**
*Energy Output, elset=panel
ALLIE, ALLSE
*End Step
