*Heading
** Job name: multiunit_60_bistable_18-02 Model name: fv_60-bistable
** Generated by: Abaqus/CAE 6.14-4
*Preprint, echo=NO, model=NO, history=NO, contact=NO
**
** PARTS
**
*Part, name=e60
*Node
      1,  -6.07870007,  -9.72860146,           0.
      2,  -5.61681938,  -10.5285997,           0.
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*Element, type=S4R
 1,    1,  278, 3972,  287
 2,  278,  279, 3973, 3972
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*Element, type=S3
1393, 1086,  153,  747
1398,  612,  107, 1087
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*Nset, nset=Set-1
     1,     2,     3,     4,     5,     6
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*Elset, elset=Set-1
  1418,  1419,  1420,  1421,  1422,  1423
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*Nset, nset=Set-2
     1,     2,     3,     4,     5,     6
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*Elset, elset=Set-2
     1,     2,     3,     4,     5,     6
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** Section: Section-2
*Shell Section, elset=Set-2, material=PLA
0.4, 5
** Section: Section-1
*Shell Section, elset=Set-1, composite
1.8, 3, PLA, 0., P1
0.2, 3, PLA, 90., P2
*End Part
**
*Part, name=harrmer2
*Node
      1,           2.,           0.,           0.
      2,           2.,          10.,           0.
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*Element, type=R3D4
  1,   1,  33,  95,  34
  2,  33,  32,  96,  95
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*Element, type=R3D3
776, 895, 894, 914
777, 827, 825, 824
778, 840, 855, 841
779, 892, 904, 893
780, 958, 968, 926
*Node
    973,  -7.47282112e-15,          -2.,           0.
*Nset, nset=harrmer2-RefPt_, internal
973,
*Elset, elset=harrmer2, generate
   1,  958,    1
*End Part
**
**
** ASSEMBLY
**
*Assembly, name=Assembly
**
*Instance, name=e60-1, part=e60
*End Instance
**
*Instance, name=harrmer2-1, part=harrmer2
     12.1574,      21.0572,          -2.
     12.1574,      21.0572,          -2.,      11.1574,      21.0572,          -2.,          90.
*End Instance
**
*Nset, nset=Set-83, instance=e60-1
 277,
*Nset, nset=Set-84, instance=e60-1
 249,
*Nset, nset=Set-85, instance=e60-1
 276,
*Nset, nset=Set-86, instance=e60-1
 250,
*Nset, nset=Set-87, instance=e60-1
     1,     2,     3,     4,     5,     6
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*Elset, elset=Set-87, instance=e60-1
     1,     2,     3,     4,     5,     6
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*Nset, nset=Set-91, instance=e60-1, generate
     1,  16873,      1
*Elset, elset=Set-91, instance=e60-1, generate
     1,  15960,      1
*Nset, nset=Set-93, instance=harrmer2-1
 973,
*Nset, nset=load, instance=harrmer2-1
 973,
*Nset, nset=m_Set-92, instance=harrmer2-1
 973,
*Elset, elset=_Surf-1_SPOS, internal, instance=e60-1
     1,     2,     3,     4,     5,     6
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*Surface, type=ELEMENT, name=Surf-1
_Surf-1_SPOS, SPOS
*Elset, elset=_Surf-3_SNEG, internal, instance=e60-1, generate
     1,  15960,      1
*Surface, type=ELEMENT, name=Surf-3
_Surf-3_SNEG, SNEG
*Elset, elset=_s_Surf-2_SPOS, internal, instance=e60-1
 1403, 1404, 1405, 1406, 1407, 1408
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*Surface, type=ELEMENT, name=s_Surf-2
_s_Surf-2_SPOS, SPOS
*Rigid Body, ref node=harrmer2-1.harrmer2-RefPt_, elset=harrmer2-1.harrmer2
** Constraint: Constraint-8
*Coupling, constraint name=Constraint-8, ref node=m_Set-92, surface=s_Surf-2
*Kinematic
*End Assembly
*Amplitude, name=Amp-1, definition=SMOOTH STEP
             0.,             25.,             0.1,             55.
*Amplitude, name=Amp-2, definition=SMOOTH STEP
             0.,              0.,             0.5,              1.
*Amplitude, name=Amp-3
             0.,             25.,             0.5,             65.
*Amplitude, name=Amp-4
             0.,              0.,             0.1,              1.,             0.3,              0.
*Amplitude, name=Amp-5, definition=SMOOTH STEP
             0.,              0.,             0.5,              1.
**
** MATERIALS
**
*Material, name=PLA
*Density
 1.25e-09,
*Elastic, type=LAMINA
 8.26, 6.608,  0.45,  0.79,  0.79,  0.79
*Expansion, type=ORTHO
 -0.00144675, 0.00017025,         0.
**
** INTERACTION PROPERTIES
**
*Surface Interaction, name=IntProp-1
*Friction
 0.3,
*Surface Behavior, pressure-overclosure=HARD
**
** BOUNDARY CONDITIONS
**
** Name: BC-5 Type: Displacement/Rotation
*Boundary
Set-83, 3, 3
** Name: BC-6 Type: Displacement/Rotation
*Boundary
Set-84, 3, 3
** Name: BC-7 Type: Displacement/Rotation
*Boundary
Set-85, 3, 3
** Name: BC-8 Type: Displacement/Rotation
*Boundary
Set-86, 3, 3
** Name: BC-9 Type: Displacement/Rotation
*Boundary
Set-93, 1, 1
Set-93, 2, 2
Set-93, 4, 4
Set-93, 5, 5
Set-93, 6, 6
**
** PREDEFINED FIELDS
**
** Name: Predefined Field-7   Type: Temperature
*Initial Conditions, type=TEMPERATURE
Set-91, 25.
**
** INTERACTIONS
**
** Interaction: Int-3
*Contact, op=NEW
*Contact Inclusions, ALL EXTERIOR
*Contact Property Assignment
 ,  , IntProp-1
** ----------------------------------------------------------------
**
** STEP: Step-3
**
*Step, name=Step-3, nlgeom=YES
*Dynamic, Explicit
, 0.5
*Bulk Viscosity
0.06, 1.2
** Mass Scaling: Semi-Automatic
**               Whole Model
*Fixed Mass Scaling, dt=1e-06, type=below min
**
** LOADS
**
** Name: Load-1   Type: Pressure
*Dsload, amplitude=Amp-4
Surf-3, P, -1e-06
**
** PREDEFINED FIELDS
**
** Name: Predefined Field-7   Type: Temperature
*Temperature, amplitude=Amp-3
Set-91, 1.
**
** OUTPUT REQUESTS
**
*Restart, write, number interval=1, time marks=NO
**
** FIELD OUTPUT: F-Output-2
**
*Output, field, number interval=100
*Node Output
A, AR, AT, U, UR, UT, V, VR
VT
*Element Output, directions=YES
CTSHR, E, EFABRIC, ER, ERV, LE, MISES, MISESMAX, MISESONLY, NE, PE, PEEQ, PEEQMAX, PEEQT, PEEQVAVG, PEMAG
PEQC, PEVAVG, PRESSONLY, PS, S, SE, SFABRIC, SSAVG, SVAVG, TRIAX, TSHR, VE, VEEQ, VS
**
** HISTORY OUTPUT: H-Output-3
**
*Output, history, time interval=0.00025
*Energy Output
ALLAE, ALLCD, ALLCW, ALLDC, ALLDMD, ALLFD, ALLIE, ALLKE, ALLMW, ALLPD, ALLPW, ALLSE, ALLVD, ALLWK, ETOTAL
**
** HISTORY OUTPUT: H-Output-4
**
*Node Output, nset=load
RF3, U3
*End Step
** ----------------------------------------------------------------
**
** STEP: Step-4
**
*Step, name=Step-4, nlgeom=YES
*Dynamic, Explicit
, 0.5
*Bulk Viscosity
0.06, 1.2
** Mass Scaling: Semi-Automatic
**               Whole Model
*Fixed Mass Scaling, dt=1e-06, type=below min
**
** BOUNDARY CONDITIONS
**
** Name: BC-9 Type: Displacement/Rotation
*Boundary, amplitude=Amp-5
Set-93, 1, 1
Set-93, 2, 2
Set-93, 3, 3, 40.
Set-93, 4, 4
Set-93, 5, 5
Set-93, 6, 6
**
** LOADS
**
** Name: Load-1   Type: Pressure
*Dsload, op=NEW
**
** OUTPUT REQUESTS
**
*Restart, write, number interval=1, time marks=NO
**
** FIELD OUTPUT: F-Output-2
**
*Output, field, number interval=100
*Node Output
A, AR, AT, U, UR, UT, V, VR
VT
*Element Output, directions=YES
CTSHR, E, EFABRIC, ER, ERV, LE, MISES, MISESMAX, MISESONLY, NE, PE, PEEQ, PEEQMAX, PEEQT, PEEQVAVG, PEMAG
PEQC, PEVAVG, PRESSONLY, PS, S, SE, SFABRIC, SSAVG, SVAVG, TRIAX, TSHR, VE, VEEQ, VS
**
** HISTORY OUTPUT: H-Output-3
**
*Output, history, time interval=0.00025
*Energy Output
ALLAE, ALLCD, ALLCW, ALLDC, ALLDMD, ALLFD, ALLIE, ALLKE, ALLMW, ALLPD, ALLPW, ALLSE, ALLVD, ALLWK, ETOTAL
**
** HISTORY OUTPUT: H-Output-4
**
*Node Output, nset=load
RF3, U3
*End Step
