*Heading
** Job name: Mask_self-folding Model name: mask-Copy
** Generated by: Abaqus/CAE 6.14-4
*Preprint, echo=NO, model=NO, history=NO, contact=NO
**
** PARTS
**
*Part, name=IMM_V3
*Node
      1,   57.9845963,   40.7743149,           0.
      2,   53.3835869,   28.5176868,           0.
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*Element, type=S4R
  1,    1,  195, 1955,  285
  2,  195,  196, 1956, 1955
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*Element, type=S3
3354, 5037, 5559, 5491
3355, 5875, 5088, 5869
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*Nset, nset=Set-1
   21,   22,   63,   64,   65,   66
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*Elset, elset=Set-1, generate
 1360,  2477,     1
*Nset, nset=Set-5
    89,    90,   181,   182,   183,   189
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*Elset, elset=Set-5, generate
 17651,  17786,      1
*Nset, nset=Set-7
    27,    28,    29,    30,    31,    32
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*Elset, elset=Set-7
   996,   997,   998,   999,  1000,  1001
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*Nset, nset=Set-9
   101,   102,   103,   104,   184,   185
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*Elset, elset=Set-9, generate
 15575,  17650,      1
*Nset, nset=Set-11
    46,    47,    48,    49,    50,    51
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*Elset, elset=Set-11
   972,   973,   974,   975,   976,   977
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*Nset, nset=Set-14
    27,    28,    29,    30,    31,    32
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*Elset, elset=Set-14
   996,   997,   998,   999,  1000,  1001
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*Nset, nset=Set-19
   16,   19,   37,   38,   39,   40
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*Elset, elset=Set-19, generate
 877,  971,    1
*Nset, nset=Set-20
   33,   34,   35,   36,  123,  124
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*Elset, elset=Set-20, generate
 4693,  6726,     1
*Nset, nset=Set-21
    17,    18,    88,    91,   118,   119
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*Elset, elset=Set-21, generate
 11936,  12338,      1
*Nset, nset=Set-22
    14,    15,    21,    22,    24,    27
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*Elset, elset=Set-22
   996,   997,   998,   999,  1000,  1001
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*Elset, elset=Set-25
   877,   878,   879,   880,   881,   882
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*Elset, elset=Set-27
   815,   816,   817,   818,   819,   820
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*Elset, elset=Set-30, generate
 2478,  3291,     1
*Nset, nset=Set-31
    1,    2,    3,    4,    5,    6
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*Elset, elset=Set-31, generate
   1,  814,    1
*Nset, nset=Set-32
    92,    93,    94,    96,   147,   148
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*Elset, elset=Set-32, generate
 10710,  11922,      1
*Nset, nset=Set-33
   20,   23,   25,   26,  105,  106
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*Elset, elset=Set-33, generate
 3354,  4597,     1
*Nset, nset=Set-34
    17,    18,    88,    91,   118,   119
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*Elset, elset=Set-34, generate
 11936,  12338,      1
** Section: Section-7-_PICKEDSET29
*Shell Section, elset=Set-31, composite
0.5, 3, PLA, 95., Ply-1
0.5, 3, ISOTROPICPLA, 5., Ply-2
** Section: Section-1-_PICKEDSET15
*Shell Section, elset=Set-27, material=PLA
0.4, 5
** Section: Section-6-_PICKEDSET19
*Shell Section, elset=Set-25, material=PLA
1., 5
** Section: Section-8-_PICKEDSET36
*Shell Section, elset=Set-22, composite
0.5, 3, PLA, 90., Ply-1
0.5, 3, PLA, 0., Ply-2
** Section: Section-5-_PICKEDSET17
*Shell Section, elset=Set-30, composite
0.5, 3, PLA, 85., Ply-1
0.5, 3, ISOTROPICPLA, -5., Ply-2
** Section: Section-4-_PICKEDSET25
*Shell Section, elset=Set-33, composite
0.5, 3, ISOTROPICPLA, 163., Ply-1
0.5, 3, PLA, 73., Ply-2
** Section: Section-11-_PICKEDSET27
*Shell Section, elset=Set-20, composite
0.5, 3, ISOTROPICPLA, 157., Ply-1
0.5, 3, PLA, 67., Ply-2
** Section: Section-3-_PICKEDSET21
*Shell Section, elset=Set-32, composite
0.5, 3, PLA, 17., Ply-1
0.5, 3, ISOTROPICPLA, 107., Ply-2
** Section: Section-9-_PICKEDSET35
*Shell Section, elset=Set-34, composite
0.5, 3, PLA, 0., Ply-1
0.5, 3, PLA, 90., Ply-2
** Section: Section-10-_PICKEDSET22
*Shell Section, elset=Set-9, composite
0.5, 3, ISOTROPICPLA, 23., Ply-1
0.5, 3, PLA, 113., Ply-2
*End Part
**
**
** ASSEMBLY
**
*Assembly, name=Assembly
**
*Instance, name=IMM_V3-1, part=IMM_V3
*End Instance
**
*Nset, nset=Set-9, instance=IMM_V3-1
    46,    51,    52,    57,    60,    61
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*Elset, elset=Set-9, instance=IMM_V3-1
   972,   978,   984,   990,  1217,  1230
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*Nset, nset=Set-10, instance=IMM_V3-1
    46,    51,    52,    57,    60,    61
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*Elset, elset=Set-10, instance=IMM_V3-1
   972,   978,   984,   990,  1217,  1230
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*Nset, nset=Set-11, instance=IMM_V3-1
    46,    51,    52,    57,    60,    61
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*Elset, elset=Set-11, instance=IMM_V3-1
   972,   978,   984,   990,  1217,  1230
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*Nset, nset=Set-12, instance=IMM_V3-1
    46,    51,    52,    57,    60,    61
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*Elset, elset=Set-12, instance=IMM_V3-1
   972,   978,   984,   990,  1217,  1230
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*Nset, nset=Set-13, instance=IMM_V3-1
    46,    51,    52,    57,    60,    61
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*Elset, elset=Set-13, instance=IMM_V3-1
   972,   978,   984,   990,  1217,  1230
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*Nset, nset=Set-14, instance=IMM_V3-1
    60,    61,    63,    70,    73,    78
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*Elset, elset=Set-14, instance=IMM_V3-1
  3296,  3297,  3298,  3299,  3300,  3301
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*Nset, nset=Set-19, instance=IMM_V3-1, generate
     1,  18391,      1
*Elset, elset=Set-19, instance=IMM_V3-1, generate
     1,  17786,      1
*Nset, nset=Set-20, instance=IMM_V3-1, generate
     1,  18391,      1
*Elset, elset=Set-20, instance=IMM_V3-1, generate
     1,  17786,      1
*Nset, nset=Set-21, instance=IMM_V3-1
 161,
*End Assembly
*Amplitude, name=Amp-1, definition=SMOOTH STEP
             0.,             25.,             0.5,             65.
**
** MATERIALS
**
*Material, name=ISOTROPICPLA
*Density
 1.24e+09,
*Elastic, type=LAMINA
 4.87,  4.9,  0.4, 0.67, 0.67, 0.67
*Expansion
 -0.00125035,
*Material, name=PLA
*Density
 1.24e+09,
*Elastic, type=LAMINA
 4.87,  4.9,  0.4, 0.67, 0.67, 0.67
*Expansion, type=ORTHO
 -0.00125035, 0.00010575,         0.
**
** BOUNDARY CONDITIONS
**
** Name: BC-7 Type: Symmetry/Antisymmetry/Encastre
*Boundary
Set-21, ENCASTRE
**
** PREDEFINED FIELDS
**
** Name: Field-1   Type: Temperature
*Initial Conditions, type=TEMPERATURE
Set-19, 25.
** ----------------------------------------------------------------
**
** STEP: Step-1
**
*Step, name=Step-1, nlgeom=YES
*Static
1., 1., 2e-07, 1.
**
** PREDEFINED FIELDS
**
** Name: Field-1   Type: Temperature
*Temperature, op=NEW
** Name: Predefined Field-2   Type: Temperature
*Temperature, op=NEW, amplitude=Amp-1
Set-20, 1.
**
** OUTPUT REQUESTS
**
*Restart, write, frequency=0
**
** FIELD OUTPUT: F-Output-1
**
*Output, field, variable=PRESELECT, frequency=5
**
** HISTORY OUTPUT: H-Output-1
**
*Output, history, variable=PRESELECT
*End Step
